**************************************************
** Elastic cantilever beam with 20x4 U7 (CPE4) elements
** 10E3 shear traction on the right surface and gravity
** demonstrate traction load and body force application
** on user element using the dummy element technique
**************************************************
*Heading
*Node
1,           0.,           0.
2,          0.5,           0.
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**************************************************
*User Element,Type=U7,Nodes=4,Coordinates=2,Properties=2,Iproperties=2
1,2
*Element, type=U7
1,   1,   2,  23,  22
2,   2,   3,  24,  23
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*System
**************************************************
*Nset, nset=All, generate
1,  105,    1
*Elset, elset=All, generate
1,  80,   1
*Nset, nset=Bottom, generate
1,  21,   1
*Elset, elset=Bottom, generate
1,  20,   1
*Nset, nset=Left, generate
1,  85,  21
*Elset, elset=Left, generate
1,  61,  20
*Nset, nset=Right, generate
21,  105,   21
*Elset, elset=Right, generate
20,  80,  20
*Nset, nset=Top, generate
85,  105,    1
*Elset, elset=Top, generate
61,  80,   1
**************************************************
*Element, type=CPE4
100001, 1, 2, 23, 22
100002, 2, 3, 24, 23
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**************************************************
** To apply surface traction load with UEL I created surfaces
** using the dummy elements manually in the input file
** The easiest way to do is to create it on the original
** CAE model and generate input file and edit it manually
** for the dummy elements
**************************************************s
*Elset, elset=ElDummy, generate
100001,100080,1
*Elset, elset=_BottomSurf_S1, generate
100001,  100020,   1
*Surface, type=ELEMENT, name=BottomSurf
_BottomSurf_S1, S1
*Elset, elset=_LeftSurf_S4, generate
100001,  100061,  20
*Surface, type=ELEMENT, name=LeftSurf
_LeftSurf_S4, S4
*Elset, elset=_RightSurf_S2, generate
100020,  100080,  20
*Surface, type=ELEMENT, name=RightSurf
_RightSurf_S2, S2
*Elset, elset=_TopSurf_S3, generate
100061,  100080,   1
*Surface, type=ELEMENT, name=TopSurf
_TopSurf_S3, S3
**************************************************
*uel property,elset=all
** rho, E, nu, nInt, nPostVar
79E9, 0.3, 4, 6
**************************************************
** define a negligible elastic modulus for the dummy element
** define density for the dummy element to apply body force
** strain vector (3) and stress vector (3) as user output
**************************************************
*Solid section, elset=elDummy, material=Dummy
*Material, name=Dummy
*Elastic
1.e-20
*Density
7810.0
*User output variables
6
**************************************************
** clamped left boundary for cantilever beam
*Boundary
Left, 1, 2
**************************************************
** I am applying shear traction on the right surface and
** gravity load in all the dummy elements for body force
** specify the user-defined output for the dummy elements
**************************************************s
*Step, name=Bending, nlgeom=NO, inc=1000
*Static
0.25, 1, 0.001, 1
*Dsload
RightSurf, TRSHR, 100000., 0., -1., 0.
*Dload
ElDummy, GRAV, 9.8, 0., -1.
*Output, field, frequency=1, time marks=no
*node output, nset=All
u
*element output, elset=elDummy
uvarm
*End Step
**************************************************
